<?xml version="1.0" ?>
<Node name="root" dt="0.03" showBoundingTree="0" gravity="0 -0.9 0">
    <Node name="RequiredPlugins">
        <RequiredPlugin pluginName="Sofa.Component.Collision.Detection.Algorithm"/> <!-- Needed to use components [BVHNarrowPhase, BruteForceBroadPhase, CollisionPipeline] -->
        <RequiredPlugin pluginName="Sofa.Component.Collision.Detection.Intersection"/> <!-- Needed to use components [MinProximityIntersection] -->
        <RequiredPlugin pluginName="Sofa.Component.Collision.Geometry"/> <!-- Needed to use components [PointCollisionModel, SphereCollisionModel, TriangleCollisionModel] -->
        <RequiredPlugin pluginName="Sofa.Component.Collision.Response.Contact"/> <!-- Needed to use components [DefaultContactManager] -->
        <RequiredPlugin pluginName="Sofa.Component.Constraint.Projective"/> <!-- Needed to use components [FixedConstraint] -->
        <RequiredPlugin pluginName="Sofa.Component.Engine.Select"/> <!-- Needed to use components [BoxROI] -->
        <RequiredPlugin pluginName="Sofa.Component.LinearSolver.Iterative"/> <!-- Needed to use components [CGLinearSolver] -->
        <RequiredPlugin pluginName="Sofa.Component.Mapping.Linear"/> <!-- Needed to use components [IdentityMapping] -->
        <RequiredPlugin pluginName="Sofa.Component.Mass"/> <!-- Needed to use components [DiagonalMass, UniformMass] -->
        <RequiredPlugin pluginName="Sofa.Component.IntegrationScheme.Backward"/> <!-- Needed to use components [EulerImplicitIntegrationScheme] -->
        <RequiredPlugin pluginName="Sofa.Component.SolidMechanics.FEM.Elastic"/> <!-- Needed to use components [TetrahedralCorotationalFEMForceField] -->
        <RequiredPlugin pluginName="Sofa.Component.StateContainer"/> <!-- Needed to use components [MechanicalObject] -->
        <RequiredPlugin pluginName="Sofa.Component.Topology.Container.Dynamic"/> <!-- Needed to use components [TetrahedronSetGeometryAlgorithms, TetrahedronSetTopologyContainer, TetrahedronSetTopologyModifier, TriangleSetGeometryAlgorithms, TriangleSetTopologyContainer, TriangleSetTopologyModifier] -->
        <RequiredPlugin pluginName="Sofa.Component.Topology.Container.Grid"/> <!-- Needed to use components [RegularGridTopology] -->
        <RequiredPlugin pluginName="Sofa.Component.Topology.Mapping"/> <!-- Needed to use components [Hexa2TetraTopologicalMapping, Tetra2TriangleTopologicalMapping] -->
        <RequiredPlugin pluginName="Sofa.Component.Visual"/> <!-- Needed to use components [VisualStyle] -->
        <RequiredPlugin pluginName="Sofa.GL.Component.Rendering3D"/> <!-- Needed to use components [OglModel] -->
        <RequiredPlugin pluginName="SofaCarving"/> <!-- Needed to use components [CarvingManager] -->
        <RequiredPlugin pluginName="InfinyToolkit"/> <!-- Needed to use components [CarvingManager] -->
    </Node>

    <VisualStyle displayFlags="showCollisionModels hideVisual" />

    <DefaultAnimationLoop />
    <DefaultVisualManagerLoop />
    <CollisionPipeline verbose="0" />
    <BruteForceBroadPhase/>
    <BVHNarrowPhase/>
    <CollisionResponse response="PenalityContactForceField" />
    <MinProximityIntersection name="Proximity" alarmDistance="1.0" contactDistance="0.1"/>

    <EulerImplicitIntegrationScheme name="EulerImplicit"  rayleighStiffness="0.1" rayleighMass="0.1" />
    <CGLinearSolver name="CG Solver" iterations="25" tolerance="1e-9" threshold="1e-9"/>

    <CarvingManager active="true" carvingDistance="1.0"/>

    <Node name="carvingElement">
        <MechanicalObject name="Particles" template="Vec3d" position="-5 10 0" velocity="0 0 0"/>
        <UniformMass name="Mass" totalMass="10.0" />
        <SphereCollisionModel name="tool" radius="0.1" contactStiffness="10" tags="CarvingTool"/>
    </Node>

    <Node name="LiverFFD-lowres">
        <EulerImplicitIntegrationScheme  />
        <CGLinearSolver iterations="100" tolerance="1e-7" threshold="1e-7"/>
        <MechanicalObject name="gridDof"/>
        <UniformMass totalMass="100.0" />
        <RegularGridTopology nx="4" ny="3" nz="3" xmin="-10.25" xmax="-3.25" ymin="0.25" ymax="5.25" zmin="-2" zmax="3" />
        <BoxConstraint box="-8.5 0 -2.5 -5 3 2" />
        <RegularGridSpringForceField name="Springs" stiffness="400" damping="4" />
        <Node name="Visu">
            <MeshOBJLoader name="meshLoader" filename="mesh/liver.obj" translation="-5 0 0" handleSeams="1" />
            <MechanicalObject position="@[-1].position" name="surfDof" />

            <TriangleSetTopologyContainer  name="Container" triangles="@meshLoader.triangles"/>
            <TriangleSetTopologyModifier   name="Modifier" />
            <TriangleSetGeometryAlgorithms name="GeomAlgo" template="Vec3d" drawTriangles="0"/>

            <TriangleCollisionModel name="triangleCol" contactStiffness="10" tags="CarvingSurface"/>
            <PointCollisionModel name="pointCol" contactStiffness="10" tags="CarvingSurface"/>

            <BarycentricMapping input="@../gridDof" output="@./surfDof" />
        </Node>

    </Node>
</Node>
