<?xml version="1.0" ?>
<Node name="root" dt="0.05" gravity="0 -9 0" >
    <VisualStyle displayFlags="showVisualModels hideBehaviorModels hideCollisionModels hideMappings hideForceFields" />

    <Node name="RequiredPlugins">
        <RequiredPlugin pluginName="Geomagic"/> <!-- Needed to use components [GeomagicDriver] -->
        <RequiredPlugin pluginName="Sofa.Component.AnimationLoop"/> <!-- Needed to use components [FreeMotionAnimationLoop] -->
        <RequiredPlugin pluginName="Sofa.Component.Collision.Detection.Algorithm"/> <!-- Needed to use components [BVHNarrowPhase, BruteForceBroadPhase, CollisionPipeline] -->
        <RequiredPlugin pluginName="Sofa.Component.Collision.Detection.Intersection"/> <!-- Needed to use components [LocalMinDistance] -->
        <RequiredPlugin pluginName="Sofa.Component.Collision.Geometry"/> <!-- Needed to use components [LineCollisionModel, PointCollisionModel, TriangleCollisionModel] -->
        <RequiredPlugin pluginName="Sofa.Component.Collision.Response.Contact"/> <!-- Needed to use components [DefaultContactManager] -->
        <RequiredPlugin pluginName="Sofa.Component.Constraint.Lagrangian.Correction"/> <!-- Needed to use components [LinearSolverConstraintCorrection] -->
        <RequiredPlugin pluginName="Sofa.Component.Constraint.Lagrangian.Solver"/> <!-- Needed to use components [LCPConstraintSolver] -->
        <RequiredPlugin pluginName="Sofa.Component.Constraint.Projective"/> <!-- Needed to use components [FixedConstraint] -->
        <RequiredPlugin pluginName="Sofa.Component.Engine.Select"/> <!-- Needed to use components [BoxROI] -->
        <RequiredPlugin pluginName="Sofa.Component.Haptics"/> <!-- Needed to use components [LCPForceFeedback] -->
        <RequiredPlugin pluginName="Sofa.Component.IO.Mesh"/> <!-- Needed to use components [MeshOBJLoader] -->
        <RequiredPlugin pluginName="Sofa.Component.LinearSolver.Direct"/> <!-- Needed to use components [SparseLDLSolver] -->
        <RequiredPlugin pluginName="Sofa.Component.Mapping.Linear"/> <!-- Needed to use components [IdentityMapping] -->
        <RequiredPlugin pluginName="Sofa.Component.Mapping.NonLinear"/> <!-- Needed to use components [RigidMapping] -->
        <RequiredPlugin pluginName="Sofa.Component.Mass"/> <!-- Needed to use components [DiagonalMass, UniformMass] -->
        <RequiredPlugin pluginName="Sofa.Component.IntegrationScheme.Backward"/> <!-- Needed to use components [EulerImplicitIntegrationScheme] -->
        <RequiredPlugin pluginName="Sofa.Component.SolidMechanics.FEM.Elastic"/> <!-- Needed to use components [TetrahedralCorotationalFEMForceField] -->
        <RequiredPlugin pluginName="Sofa.Component.SolidMechanics.Spring"/> <!-- Needed to use components [RestShapeSpringsForceField] -->
        <RequiredPlugin pluginName="Sofa.Component.StateContainer"/> <!-- Needed to use components [MechanicalObject] -->
        <RequiredPlugin pluginName="Sofa.Component.Topology.Container.Constant"/> <!-- Needed to use components [MeshTopology] -->
        <RequiredPlugin pluginName="Sofa.Component.Topology.Container.Dynamic"/> <!-- Needed to use components [TetrahedronSetGeometryAlgorithms, TetrahedronSetTopologyContainer, TetrahedronSetTopologyModifier, TriangleSetGeometryAlgorithms, TriangleSetTopologyContainer, TriangleSetTopologyModifier] -->
        <RequiredPlugin pluginName="Sofa.Component.Topology.Container.Grid"/> <!-- Needed to use components [RegularGridTopology] -->
        <RequiredPlugin pluginName="Sofa.Component.Topology.Mapping"/> <!-- Needed to use components [Hexa2TetraTopologicalMapping, Tetra2TriangleTopologicalMapping] -->
        <RequiredPlugin pluginName="Sofa.Component.Visual"/> <!-- Needed to use components [VisualStyle] -->
        <RequiredPlugin pluginName="Sofa.GL.Component.Rendering3D"/> <!-- Needed to use components [OglModel] -->
        <RequiredPlugin pluginName="InfinyToolkit" />
    </Node>

    <DefaultVisualManagerLoop />
    <FreeMotionAnimationLoop/>
    <LCPConstraintSolver tolerance="0.001" maxIt="1000"/>

    <CollisionPipeline name="pipeline" depth="6" verbose="0"/>
    <BruteForceBroadPhase/>
    <BVHNarrowPhase/>
    <CollisionResponse name="response" response="FrictionContactConstraint" />
    <MinProximityIntersection name="Proximity" alarmDistance="0.8" contactDistance="0.2" />

    <GeomagicDriver name="GeomagicDevice" deviceName="Default Device" scale="1" drawDeviceFrame="0"
        positionBase="0 0 0" orientationBase="0 0.707 0 -0.707" drawDevice="0"/>
	<AdvancedCarvingManager name="ACarving" active="1" process="@GeomagicDevice.button1" refineDistance="1.5" refineCriteria="0.5" carvingDistance="0.1"
        carvingWithBurning="1" carvingWithRefinement="0" drawContacts="0"/>


    <Node name="ToolController">
        <MechanicalObject template="Rigid3" name="DOFs" position="@GeomagicDevice.positionDevice"/>
    </Node>


	<Node name="Hexa2Tetra" >
        <RegularGridTopology name="HexaTop" n="7 7 7" min="1 0 3" max="11 10 13" />
        <TetrahedronSetTopologyContainer name="Container" position="@HexaTop.position" />
        <TetrahedronSetTopologyModifier name="Modifier"/>
        <Hexa2TetraTopologicalMapping input="@HexaTop" output="@Container" swapping="false" />
    </Node>

    <Node name="Cube">
        <EulerImplicitIntegrationScheme name="ODE solver" rayleighStiffness="0.05" rayleighMass="1.0" />
		<SparseLDLSolver template="CompressedRowSparseMatrixMat3x3d"/>
        <MechanicalObject position="@../Hexa2Tetra/Container.position" name="Volume" />

        <TetrahedronSetTopologyContainer name="Tetra_topo" src="@../Hexa2Tetra/Container" />
        <TetrahedronSetTopologyModifier name="Modifier" />
        <TetrahedronSetGeometryAlgorithms name="GeomAlgo" template="Vec3d" drawTetrahedra="0" drawScaleTetrahedra="0.8"/>

        <DiagonalMass massDensity="10.0" />

        <BoxROI name="box" box="-1 -1 -1 12 0 14" drawBoxes="true" />
        <FixedProjectiveConstraint  name="FixedConstraint" indices="@box.indices" activate_projectVelocity="1"/>

        <TetrahedralCorotationalFEMForceField name="CFEM" youngModulus="5000" poissonRatio="0.3" method="large" />
        <LinearSolverConstraintCorrection/>
        <Node name="Surface">
            <TriangleSetTopologyContainer  name="Container"/>
            <TriangleSetTopologyModifier   name="Modifier" />
            <TriangleSetGeometryAlgorithms name="GeomAlgo" template="Vec3d" drawTriangles="0"/>
            <Tetra2TriangleTopologicalMapping input="@../Tetra_topo" output="@Container" />

            <TriangleCollisionModel name="triangleCol" tags="CarvingSurface"/>
            <LineCollisionModel name="instrumentLine" />
            <PointCollisionModel name="pointCol" tags="CarvingSurface"/>

            <Node name="liver-Visual">
                <OglModel name="Visual" texcoords="@../../../ACarving.texcoords" texturename="textures/colorMap.png" />
                <IdentityMapping input="@../../Volume" output="@Visual" />
            </Node>
        </Node>
    </Node>


    <Node name="Instrument" >
        <EulerImplicitIntegrationScheme name="ODE solver" rayleighStiffness="0.05" rayleighMass="1.0" />
		<SparseLDLSolver template="CompressedRowSparseMatrixMat3x3d"/>

		<MechanicalObject name="instrumentState" template="Rigid3" tags="GeomagicDevice" position="@../GeomagicDevice.positionBase"/>
		<UniformMass name="mass" totalMass="0.1" />

		<RestShapeSpringsForceField stiffness='1000000' angularStiffness='1000000' external_rest_shape='@../ToolController/DOFs' points='0' external_points='0' />
        <LCPForceFeedback activate="true" forceCoef="0.001"/>
        <LinearSolverConstraintCorrection/>

        <Node name="CollisionModel" >
            <MeshOBJLoader filename="./mesh/Cautery-Hook_collision.obj"  name="loader"/>
            <MeshTopology src="@loader" name="InstrumentCollisionModel" />
            <MechanicalObject src="@loader" name="instrumentCollisionState" ry="-90" dz="0.1" dy="0.6" />
            <LineCollisionModel name="instrumentLine" contactStiffness="10" />
            <PointCollisionModel name="instrumentPoint" contactStiffness="10" tags="CarvingTool" />
            <RigidMapping name="MM->CM mapping" input="@instrumentState" output="@instrumentCollisionState" />
        </Node>

        <Node name="VisuTool" >
            <MeshOBJLoader name="meshLoader_1" filename="./mesh/Cautery-Hook.obj" handleSeams="1" />
            <OglModel name="InstrumentVisualModel" src="@meshLoader_1" ry="-90" dz="0.1" dy="0.6"/>
            <RigidMapping name="MM->VM mapping" input="@instrumentState" output="@InstrumentVisualModel" />
        </Node>
    </Node>

</Node>
