<?xml version="1.0" ?>
<!--
    TetrahedronSubdivisionController: refine a chosen set of tetrahedra.

    Press '3' to subdivide the tetrahedra listed in testID, plus the neighbours
    the new points affect, so the mesh stays conforming.

    The mesh is generated by the scene (RegularGridTopology + Hexa2Tetra), so this
    example needs no mesh file.
-->
<Node name="root" dt="0.01" gravity="0 -9 0">
    <Node name="RequiredPlugins">
        <RequiredPlugin pluginName="InfinyToolkit.MeshRefinement"/> <!-- Needed to use components [TetrahedronSubdivisionController] -->
        <RequiredPlugin pluginName="Sofa.Component.Constraint.Projective"/> <!-- Needed to use components [FixedProjectiveConstraint] -->
        <RequiredPlugin pluginName="Sofa.Component.Engine.Select"/> <!-- Needed to use components [BoxROI] -->
        <RequiredPlugin pluginName="Sofa.Component.LinearSolver.Iterative"/> <!-- Needed to use components [CGLinearSolver] -->
        <RequiredPlugin pluginName="Sofa.Component.Mass"/> <!-- Needed to use components [DiagonalMass] -->
        <RequiredPlugin pluginName="Sofa.Component.IntegrationScheme.Backward"/> <!-- Needed to use components [EulerImplicitIntegrationScheme] -->
        <RequiredPlugin pluginName="Sofa.Component.SolidMechanics.FEM.Elastic"/> <!-- Needed to use components [FastTetrahedralCorotationalForceField] -->
        <RequiredPlugin pluginName="Sofa.Component.StateContainer"/> <!-- Needed to use components [MechanicalObject] -->
        <RequiredPlugin pluginName="Sofa.Component.Topology.Container.Dynamic"/> <!-- Needed to use components [TetrahedronSetGeometryAlgorithms,TetrahedronSetTopologyContainer,TetrahedronSetTopologyModifier] -->
        <RequiredPlugin pluginName="Sofa.Component.Topology.Container.Grid"/> <!-- Needed to use components [RegularGridTopology] -->
        <RequiredPlugin pluginName="Sofa.Component.Topology.Mapping"/> <!-- Needed to use components [Hexa2TetraTopologicalMapping] -->
        <RequiredPlugin pluginName="Sofa.Component.Visual"/> <!-- Needed to use components [VisualStyle] -->
    </Node>

    <DefaultAnimationLoop />
    <DefaultVisualManagerLoop />
    <VisualStyle displayFlags="showBehaviorModels hideVisual hideWireframe" />

    <RegularGridTopology name="grid" n="4 4 4" min="-5 -5 -5" max="5 5 5" />

    <Node name="TetraGenerator">
        <MechanicalObject src="@../grid" name="Volume" />
        <TetrahedronSetTopologyContainer name="Container" />
        <TetrahedronSetTopologyModifier name="Modifier" />
        <TetrahedronSetGeometryAlgorithms name="GeomAlgo" template="Vec3d" />
        <Hexa2TetraTopologicalMapping name="hexa2tetra" input="@../grid" output="@Container" />
    </Node>

    <Node name="Beam">
        <EulerImplicitIntegrationScheme name="odesolver" rayleighStiffness="0.1" rayleighMass="0.1" />
        <CGLinearSolver iterations="25" name="linearSolver" tolerance="1e-05" threshold="1e-05"/>
        <MechanicalObject src="@../grid" name="Volume" />
        <TetrahedronSetTopologyContainer name="Tetra_topo" src="@../TetraGenerator/Container" />
        <TetrahedronSetTopologyModifier name="Modifier" />
        <TetrahedronSetGeometryAlgorithms name="GeomAlgo" template="Vec3d" drawTetrahedra="1" drawScaleTetrahedra="0.7"/>

        <!-- Press '3' to subdivide these tetrahedra. refineCriteria="0" subdivides
             every edge regardless of its length. -->
        <TetrahedronSubdivisionController name="Refiner" listening="1" printLog="1"
            testID="40 41 42" refineCriteria="0"
            drawTetra="1" drawScaleTetrahedra="0.6"/>

        <BoxROI name="box_roi" box="-5.1 4.9 -5.1 5.1 5.1 5.1" drawBoxes="1"/>
        <FixedProjectiveConstraint indices="@box_roi.indices" />

        <DiagonalMass massDensity="1.0" />
        <FastTetrahedralCorotationalForceField name="FEM" youngModulus="360" poissonRatio="0.3" method="large" />
    </Node>
</Node>
