<?xml version="1.0" ?>
<Node name="root" dt="0.003" showBoundingTree="0" gravity="0 -0.9 0">
    <Node name="RequiredPlugins">
        <RequiredPlugin pluginName="Sofa.Component.Collision.Detection.Algorithm"/> <!-- Needed to use components [BVHNarrowPhase, BruteForceBroadPhase, DefaultPipeline] -->
        <RequiredPlugin pluginName="Sofa.Component.Collision.Detection.Intersection"/> <!-- Needed to use components [MinProximityIntersection] -->
        <RequiredPlugin pluginName="Sofa.Component.Collision.Geometry"/> <!-- Needed to use components [PointCollisionModel, SphereCollisionModel, TriangleCollisionModel] -->
        <RequiredPlugin pluginName="Sofa.Component.Collision.Response.Contact"/> <!-- Needed to use components [DefaultContactManager] -->
        <RequiredPlugin pluginName="Sofa.Component.LinearSolver.Iterative"/> <!-- Needed to use components [CGLinearSolver] -->
        <RequiredPlugin pluginName="Sofa.Component.Mapping.Linear"/> <!-- Needed to use components [IdentityMapping] -->
        <RequiredPlugin pluginName="Sofa.Component.Mass"/> <!-- Needed to use components [UniformMass] -->
        <RequiredPlugin pluginName="Sofa.Component.IntegrationScheme.Backward"/> <!-- Needed to use components [EulerImplicitIntegrationScheme] -->
        <RequiredPlugin pluginName="Sofa.Component.SceneUtility"/> <!-- Needed to use components [InfoComponent] -->
        <RequiredPlugin pluginName="Sofa.Component.StateContainer"/> <!-- Needed to use components [MechanicalObject] -->
        <RequiredPlugin pluginName="Sofa.Component.Topology.Container.Dynamic"/> <!-- Needed to use components [TetrahedronSetGeometryAlgorithms, TetrahedronSetTopologyContainer, TetrahedronSetTopologyModifier, TriangleSetGeometryAlgorithms, TriangleSetTopologyContainer, TriangleSetTopologyModifier] -->
        <RequiredPlugin pluginName="Sofa.Component.Topology.Container.Grid"/> <!-- Needed to use components [RegularGridTopology] -->
        <RequiredPlugin pluginName="Sofa.Component.Topology.Mapping"/> <!-- Needed to use components [Hexa2TetraTopologicalMapping, Tetra2TriangleTopologicalMapping] -->
        <RequiredPlugin pluginName="Sofa.Component.Visual"/> <!-- Needed to use components [VisualStyle] -->
        <RequiredPlugin pluginName="Sofa.GL.Component.Rendering3D"/> <!-- Needed to use components [OglModel] -->
        <RequiredPlugin pluginName="InfinyToolkit" />
        <RequiredPlugin pluginName="MeshRefinement" />
    </Node>
    <VisualStyle displayFlags="showCollisionModels hideVisual" />

    <DefaultAnimationLoop />
    <DefaultVisualManagerLoop />
    <CollisionPipeline verbose="0" />
    <BruteForceBroadPhase/>
    <BVHNarrowPhase/>
    <CollisionResponse response="PenalityContactForceField" />
    <MinProximityIntersection name="Proximity" alarmDistance="2.0" contactDistance="0.3" />

    <Node name="carving">
        <EulerImplicitIntegrationScheme name="EulerImplicit"  rayleighStiffness="0.1" rayleighMass="0.1" />
        <CGLinearSolver name="CG Solver" iterations="25" tolerance="1e-9" threshold="1e-9"/>

        <AdvancedCarvingManager name="ACarving" active="1" refineDistance="0.0005" refineCriteria="0.5" carvingDistance="1.0"
        carvingWithBurning="0" carvingWithRefinement="1" drawContacts="1"/>

        <Node name="carvingElement">
            <MechanicalObject name="Particles" template="Vec3d" position="5 12 5" velocity="0 0 0"/>
            <UniformMass name="Mass" totalMass="10.0" />
            <SphereCollisionModel name="tool" radius="0.1" tags="CarvingTool"/>
        </Node>
    </Node>

    <Node name="Hexa2Tetra" >
        <RegularGridTopology name="HexaTop" n="11 11 11" min="0 0 0" max="10 10 10" />
        <TetrahedronSetTopologyContainer name="Container" position="@HexaTop.position" />
        <TetrahedronSetTopologyModifier name="Modifier"/>
        <Hexa2TetraTopologicalMapping input="@HexaTop" output="@Container" swapping="false" />
    </Node>

    <Node name="Cube">
        <MechanicalObject position="@../Hexa2Tetra/Container.position" name="Volume" />

        <TetrahedronSetTopologyContainer name="Tetra_topo" src="@../Hexa2Tetra/Container" />
        <TetrahedronSetTopologyModifier name="Modifier" />
        <TetrahedronSetGeometryAlgorithms name="GeomAlgo" template="Vec3d" drawTetrahedra="0" drawScaleTetrahedra="0.8"/>

        <Node name="Surface">
            <TriangleSetTopologyContainer  name="Container"/>
            <TriangleSetTopologyModifier   name="Modifier" />
            <TriangleSetGeometryAlgorithms name="GeomAlgo" template="Vec3d" drawTriangles="0"/>
            <Tetra2TriangleTopologicalMapping input="@../Tetra_topo" output="@Container" />

            <TriangleCollisionModel name="triangleCol" tags="CarvingSurface" simulated="0" moving="0" stiffness="1000"/>
            <PointCollisionModel name="pointCol" tags="CarvingSurface" simulated="0" moving="0" stiffness="1000"/>

            <Node name="liver-Visual">
                <OglModel name="Visual" color="green" />
                <IdentityMapping input="@../../Volume" output="@Visual" />
            </Node>
        </Node>
    </Node>
</Node>
